// COMSOL Multiphysics 4.4.0.150 model "membrane_2d_poisson.mph"
// Outline of the model tree

Functions
  an1: Analytic "Analytique 1" | funcname = uex; expr = 0.25 * (1.0 - x*x - y*y); args = {x, y}

Geometry
  geom1 "Géométrie 1" (2D, length unit m)
    c1: Circle "Cercle 1" | r = 1
    fin: Finalize "Constituer une union"

Physics
  poeq: PoissonEquation "Equation de Poisson" on all domains
    dependent variable u
    peq1: PoissonEquation "Equation de Poisson 1" (default)
    zflx1: ZeroFluxBoundary "Flux nul 1" (default)
    init1: init "Valeurs initiales 1" (default)
    dir1: DirichletBoundary "Conditions aux limites de Dirichlet 1" on boundaries 1-4 | r = 0
    disc1: Discretization "Discrétisation 1" | order = 1

Mesh
  mesh1 "Maillage 1" (physics-controlled)
    size: MeshSizeDefault "Taille" | hauto = 5

Studies
  std1 "Etude 1"
    stat: Stationary "Stationnaire"

Solver configurations
  sol1 "Solveur 1" (study std1)
    v1: Variables "Variables dépendantes 1"
    s1: Stationary "Solveur stationnaire 1"
      dDef: Direct
      fc1: FullyCoupled "Couplage fort 1" | linsolver = dDef

Datasets
  dset1: Solution | solution = sol1
  an1_ds1: Function2D "Fonction 2D 1"
    function = an1
    par1 = x
    parmin1 = 0
    parmax1 = 1
    par2 = y
    parmin2 = 0
    parmax2 = 1

Plots
  pg1: PlotGroup2D "Groupe de graphiques 2D 1" | data = dset1
    surf1: Surface | expr = u
      hght1: Height "Expression de l’élévation 1" | expr = u; offset = 0
    surf2: Surface | data = dset1; expr = uex(x, y)
  pg2: PlotGroup2D "Groupe de graphiques 2D 2" | data = dset1
    surf1: Surface | expr = abs(u - uex(x,y))