// COMSOL Multiphysics 4.4.0.150 model "membrane_eq_transport.mph"
// Outline of the model tree

Parameters
  rho = 1  // densite
  sigma = 1  // tension

Geometry
  geom1 "Géométrie 1" (1D axisymmetric, length unit m)
    i1: Interval "Intervalle 1" | p = 0, 1
    fin: Finalize "Constituer une union"

Physics
  waeq: WaveEquation "EDP" on all domains
    dependent variable u
    weq1: WaveEquation "Equation d’onde 1" (default) | c = sigma*r; f = 0; ea = rho*r
    zflx1: ZeroFluxBoundary "Flux nul 1" (default)
    init1: init "Valeurs initiales 1" (default)
    dir1: DirichletBoundary "Conditions aux limites de Dirichlet 1" on boundaries 2 | r = 0

Mesh
  mesh1 "Maillage 1" (physics-controlled)
    size: MeshSizeDefault "Taille" | hauto = 5

Studies
  std1 "Etude 1"
    eig: Eigenfrequency "Fréquence propre" | neigs = 6

Solver configurations
  sol1 "Solveur 1" (study std1)
    v1: Variables "Variables dépendantes 1"
    e1: Eigenvalue "Solveur aux valeurs propres 1" | neigs = 6; transform = eigenfrequency; shift = 0
      dDef: Direct

Datasets
  dset1: Solution | solution = sol1
  rev1: Revolve1D "Révolution 1D 1" | data = dset1; startangle = -90; revangle = 225

Derived values
  gev1: EvalGlobal "Evaluation globale 1" | data = dset1; table = tbl1; expr = abs(lambda)

Tables
  tbl1: Table
    // Evaluation globale 1 (lambda)
    Fréquence propre | abs(lambda)
    0.38274 | 2.40483
    0.878555 | 5.52012
    1.37736 | 8.65423
    1.87708 | 11.794
    2.37765 | 14.9392
    2.87953 | 18.0926

Plots
  pg1: PlotGroup1D "Groupe de graphiques 1D 1" | data = dset1
    lngr1: LineGraph "Graphique sur ligne 1" on all domains | expr = u; xdata = expr; xdataexpr = r
  pg2: PlotGroup2D "Groupe de graphiques 2D 2" | data = rev1
    surf1: Surface | expr = u
  pg3: PlotGroup1D "Groupe de graphiques 1D 3" | data = none
    tblp1: Table "Graphique de table 1" | table = tbl1

Exports
  img1: Image1D
    size = manual
    unit = px
    width = 800
    height = 600
    pngfilename = /home/etu/r/p1004675/Documents/atelier_numerique/be3_membrane/comsol/deformee_comsol.png
    options = on
    axes = on