// COMSOL Multiphysics 4.4.0.150 model "membrane_forme_faible.mph"
// Outline of the model tree

Parameters
  rho = 1  // Densit
  sigma = 1  // Tension

Geometry
  geom1 "Géométrie 1" (1D, length unit m)
    i1: Interval "Intervalle 1" | p = 0, 1
    fin: Finalize "Constituer une union"

Physics
  w: WeakFormPDE "EDP, forme faible" on all domains
    dependent variable u
    Units.DependentVariableQuantity = none
    wfeq1: WeakFormPDE "EDP, forme faible 1" (default) | weak = x * (rho*utt*test(u) - sigma*ux*test(ux))
    zflx1: ZeroFluxBoundary "Flux nul 1" (default)
    init1: init "Valeurs initiales 1" (default)
    dir1: DirichletBoundary "Conditions aux limites de Dirichlet 1" on boundaries 2 | r = 0

Mesh
  mesh1 "Maillage 1" (physics-controlled)
    size: MeshSizeDefault "Taille" | hauto = 5

Studies
  std1 "Etude 1"
    eigv: Eigenvalue "Valeur propre" | neigs = 20

Solver configurations
  sol1 "Solveur 1" (study std1)
    v1: Variables "Variables dépendantes 1"
    e1: Eigenvalue "Solveur aux valeurs propres 1" | neigs = 20; shift = 0
      dDef: Direct

Datasets
  dset1: Solution | solution = sol1

Derived values
  gev1: EvalGlobal "Evaluation globale 1" | data = dset1; table = tbl1; expr = (lambda)/ 2 / pi

Tables
  tbl1: Table
    // Evaluation globale 1 (sqrt(lambda)/ 2 / pi)
    Valeur propre | sqrt(lambda)/ 2 / pi | (lambda)/ 2 / pi
    2.40483 | 0.24681 | 0.38274
    5.52012 | 0.373934 | 0.878555
    8.65423 | 0.468203 | 1.37736
    11.794 | 0.546577 | 1.87708
    14.9392 | 0.615154 | 2.37765
    18.0926 | 0.676972 | 2.87953

Plots
  pg1: PlotGroup1D "Groupe de graphiques 1D 1" | data = dset1
    lngr1: LineGraph "Graphique sur ligne 1" on all domains | expr = u; xdata = expr; xdataexpr = x