// COMSOL Multiphysics 5.0.0.243 model "be3_ravahimanana.mph"
// Outline of the model tree
// Components: comp1 "Membrane patchée", comp2 "Membrane trouée", comp3 "Membrane intacte"

Parameters
  L1 = 1[m]  // longueur caracteristique
  L2 = L1/3  // longueur du patch
  L2trou = .8*L2  // longeur du trou
  m1 = 1 [kg]  // masse de la membrane
  m2 = m1/2  // masse du patch

Variables
  var1 "Variables 1" [comp2]
    rho1 = m1/comp1.S1
  var2 "Variables 2" [comp1]
    rho1 = m1/S1  // densité du matériau
    rho2 = m2/S2
  var3 "Variables 3" [comp3]
    rho1 = m1/comp1.S1

Probes
  dom1: Domain "Membrane trouée" [comp1] on domains 1, 2
    type = integral
    probename = S_membrane
    expr = 1
    descr = membrane trouée
    table = tbl6
  dom2: Domain "Patch" [comp1] on domains 2, 3 | type = integral; probename = S2; expr = 1; descr = patch; table = tbl5
  dom3: Domain "Membrane trouée" [comp2] on domains 1
    type = integral
    probename = S_trouee
    expr = 1
    unit = m^2
    descr = surface
    method = integration
    intorder = 2
    frame = geometry
    table = tbl6
  dom4: Domain "Membrane intacte" [comp3] on domains 1
    type = integral
    probename = S_intacte
    expr = 1
    intorder = 4
    frame = geometry
    table = tbl7
  dom5: Domain "Membrane entière" [comp1] on all domains
    type = integral
    probename = S1
    expr = 1
    descr = Surface totale
    frame = geometry
    table = tbl7

Geometry
  geom1 "Géométrie" [comp1] (2D, length unit m)
    pol1: Polygon "portion_membrane" | x = -L1/2, -L1*cos(pi/4)/2, 0; y = 0, L1*sin(pi/4)/2, 0
    mir1: Mirror "Miroir 1" | input = pol1; keep = on; axis = {cos(pi/4), sin(pi/4)}
    mir2: Mirror "Miroir 2" | input = mir1, pol1; keep = on; axis = {0, 1}
    mir3: Mirror "Miroir 3" | input = mir1, mir2, pol1; keep = on
    uni3: Union "membrane" | input = mir1, mir2, mir3, pol1; intbnd = off; edge = all
    pol2: Polygon "portion_trou" | x = 0, L2trou*sin(2*pi/5)/2,0; y = L2trou/2, L2trou/2*cos(2*pi/5),0
    rot1: Rotate "Rotation 1" | input = pol2; keep = on; rot = 72
    rot2: Rotate "Rotation 2" | input = rot1; keep = on; rot = 72
    rot3: Rotate "Rotation 3" | input = rot2; keep = on; rot = 72
    rot4: Rotate "Rotation 4" | input = rot3; keep = on; rot = 72
    uni1: Union "forme_trou" | input = pol2, rot1, rot2, rot3, rot4; intbnd = off; edge = all
    dif1: Difference "trouage" | input = uni3; input2 = uni1; intbnd = off; edge = all
    pol3: Polygon "portion_patch" | x = 0, L2*sin(2*pi/5)/2,0; y = L2/2, L2/2*cos(2*pi/5),0
    rot5: Rotate "Rotation 5" | input = pol3; keep = on; rot = 72
    rot6: Rotate "Rotation 6" | input = rot5; keep = on; rot = 72
    rot7: Rotate "Rotation 7" | input = rot6; keep = on; rot = 72
    rot8: Rotate "Rotation 8" | input = rot7; keep = on; rot = 72
    uni2: Union "forme_patch" | contributeto = none; input = pol3, rot5, rot6, rot7, rot8; intbnd = off; edge = all
    fin: Finalize "Constituer une union"
  geom2 "Geometry 2" [comp2] (2D, length unit m)
    pol1: Polygon "portion_membrane"
      type = solid
      source = vectors
      tableexceloverwrite = on
      x = -L1/2, -L1*cos(pi/4)/2, 0
      y = 0, L1*sin(pi/4)/2, 0
      addedrowidx = -1
    mir1: Mirror "Miroir 1"
      input = pol1
      keep = on
      posconstr = {on, on}
      axisconstr = {on, on}
      axis = {cos(pi/4), sin(pi/4)}
    mir2: Mirror "Miroir 2" | input = mir1, pol1; keep = on; posconstr = {on, on}; axisconstr = {on, on}; axis = {0, 1}
    mir3: Mirror "Miroir 3"
      input = mir1, mir2, pol1
      keep = on
      posconstr = {on, on}
      axisconstr = {on, on}
      axis = {1, 0}
    uni1: Union "membrane" | input = mir1, mir2, mir3, pol1; edge = all; regularize = on
    pol2: Polygon "portion_trou"
      type = solid
      source = vectors
      tableexceloverwrite = on
      x = 0, L2trou*sin(2*pi/5)/2,0
      y = L2trou/2, L2trou/2*cos(2*pi/5),0
      addedrowidx = -1
    rot1: Rotate "Rotation 1" | input = pol2; keep = on; rotconstr = on; rot = 72; posconstr = {on, on}
    rot2: Rotate "Rotation 2" | input = rot1; keep = on; rotconstr = on; rot = 72; posconstr = {on, on}
    rot3: Rotate "Rotation 3" | input = rot2; keep = on; rotconstr = on; rot = 72; posconstr = {on, on}
    rot4: Rotate "Rotation 4" | input = rot3; keep = on; rotconstr = on; rot = 72; posconstr = {on, on}
    uni2: Union "forme_trou" | input = pol2, rot1, rot2, rot3, rot4; edge = all; regularize = on
    dif1: Difference "trouage" | input = uni1; input2 = uni2; edge = all
    fin: Finalize "Form Union"
  geom3 "Geometry 3" [comp3] (2D, length unit m)
    pol1: Polygon "portion_membrane"
      type = solid
      source = vectors
      tableexceloverwrite = on
      x = -L1/2, -L1*cos(pi/4)/2, 0
      y = 0, L1*sin(pi/4)/2, 0
      addedrowidx = -1
    mir1: Mirror "Miroir 1"
      input = pol1
      keep = on
      posconstr = {on, on}
      axisconstr = {on, on}
      axis = {cos(pi/4), sin(pi/4)}
    mir2: Mirror "Miroir 2" | input = mir1, pol1; keep = on; posconstr = {on, on}; axisconstr = {on, on}; axis = {0, 1}
    mir3: Mirror "Miroir 3"
      input = mir1, mir2, pol1
      keep = on
      posconstr = {on, on}
      axisconstr = {on, on}
      axis = {1, 0}
    uni1: Union "membrane" | input = mir1, mir2, mir3, pol1; edge = all; regularize = on
    fin: Finalize "Form Union"

Physics
  waeq: WaveEquation "Equation des ondes" [geom1] on domains 1, 2
    dependent variable u
    Units.DependentVariableQuantity = length
    weq1: WaveEquation "Equation des ondes 1" (default) | ea = rho1
    zflx1: ZeroFluxBoundary "Flux nul 1" (default)
    init1: init "Valeurs initiales 1" (default)
    dir1: DirichletBoundary "Condition aux bords" on boundaries 1-4, 11, 14, 17, 18 | r = 0
    dir2: DirichletBoundary "Condition de continuite" on boundaries 7, 8, 10, 12, 15 | r = u2
  waeq2: WaveEquation "Equation des ondes 2" [geom1] on domains 2, 3
    dependent variable u2
    Units.DependentVariableQuantity = length
    weq1: WaveEquation "Equation des ondes 1" (default) | ea = rho2
    zflx1: ZeroFluxBoundary "Flux nul 1" (default)
    init1: init "Valeurs initiales 1" (default)
    dir1: DirichletBoundary "Condition de continuite" on boundaries 5, 6, 9, 13, 16 | r = u
  waeq3: WaveEquation [geom2] on all domains
    dependent variable u3
    weq1: WaveEquation (default) | ea = rho1
    zflx1: ZeroFluxBoundary "Zero Flux 1" (default)
    init1: init "Initial Values 1" (default)
    dir1: DirichletBoundary "Condition aux bords" on boundaries 1-4, 8, 10, 12, 13 | r = 0
  waeq4: WaveEquation [geom3] on all domains
    dependent variable u4
    weq1: WaveEquation (default) | ea = rho1
    zflx1: ZeroFluxBoundary "Zero Flux 1" (default)
    init1: init "Initial Values 1" (default)
    dir1: DirichletBoundary "Condition aux bords" on all boundaries | r = 0

Mesh
  mesh1 "Maillage 1" [geom1] (physics-controlled)
    size: MeshSizeDefault "Taille" | hauto = 5
  mesh2 "Mesh 2" [geom2] (physics-controlled)
    size: MeshSizeDefault | hauto = 5
  mesh3 "Mesh 3" [geom3] (physics-controlled)
    size: MeshSizeDefault | hauto = 5

Studies
  std1 "Etude 1"
    stat: Stationary "Stationnaire"
    eigv1: Eigenvalue "Valeur propre 1" | neigs = 6

Solver configurations
  sol1 "Solution 1" (study std1)
    v1: Variables "Variables dépendantes 1"
    s1: Stationary "Solveur stationnaire 1"
      dDef: Direct
      fc1: FullyCoupled "Couplage fort 1" | linsolver = dDef
    su1: StoreSolution
    v2: Variables "Variables dépendantes 2" | initmethod = sol; notsolmethod = sol
    e1: Eigenvalue "Solveur aux valeurs propres 1" | neigs = 6; shift = 0; linpmethod = sol
      dDef: Direct

Datasets
  dset1: Solution "Etude 1/Solution patchée" | solution = sol1
  dset3: Solution "Etude 1/Solution trouée" | solution = sol1
  dset4: Solution "Etude 1/Solution intacte" | solution = sol1
  dset5: Solution "Probe Solution 5" | solution = sol1
  int1: Integral "Membrane trouée" on domains 1, 2 | data = dset5
  dset6: Solution "Probe Solution 6" | solution = sol1
  dset7: Solution "Probe Solution 7" | solution = sol1
  dset8: Solution "Probe Solution 8" | solution = sol1
  dset9: Solution "Probe Solution 9" | solution = sol1
  int2: Integral "Membrane intacte" on domains 1 | data = dset9
  int3: Integral "Membrane trouée 1" on domains 1 | data = dset7
  int4: Integral "Patch" on domains 2, 3 | data = dset5
  dset10: Solution "Probe Solution 10" | solution = sol1
  int5: Integral "Membrane entière" on domains 1-3 | data = dset10

Derived values
  pev1: EvalPoint "Membrane trouée" | data = int1; table = tbl6; expr = 1
  pev4: EvalPoint "Membrane intacte" | data = int2; table = tbl7; expr = 1
  pev5: EvalPoint "Membrane trouée 1" | data = int3; table = tbl6; expr = 1
  pev6: EvalPoint "Patch" | data = int4; table = tbl5; expr = 1
  pev7: EvalPoint "Membrane entière" | data = int5; table = tbl7; expr = 1

Tables
  tbl5: Table "Surface du patch" | format = all; rows = none; cols = none; datacol = 1; param = 1; needsupdate = on
    patch (m^2), Patch
    0.0660456
  tbl6: Table "Surface de la membrane trouée"
    membrane trouée (m^2), Membrane trouée | surface (m^2), Membrane trouée 1
    0.664838 | 0.664838
  tbl7: Table "Surface totale" | format = all; rows = none; cols = none; datacol = 1; param = 1; needsupdate = on
    1 (m^2), Membrane intacte | Surface totale (m^2), Membrane entière
    0.707107 | 0.707107

Plots
  pg9: PlotGroup2D "Déformée 2D membrane intacte" | data = dset4
    surf1: Surface | expr = u4
  pg8: PlotGroup2D "Déformée 2D membrane trouée" | data = dset3
    surf1: Surface | expr = u3
  pg1: PlotGroup2D "Deformée 2D membrane patchée" | data = dset1
    surf1: Surface "surface u1" | data = dset1; expr = u
    surf2: Surface "surface u2" | data = dset1; expr = u2
  pg10: PlotGroup2D "Déformée membrane intacte" | data = dset4
    surf1: Surface | expr = u4
      hght1: Height "Height Expression 1" | expr = u
  pg7: PlotGroup2D "Déformée membrane trouée" | data = dset3
    surf1: Surface | expr = u3
      hght1: Height "Height Expression 1" | expr = u
  pg2: PlotGroup2D "Deformee membrane patchée" | data = dset1; xlabel = x; ylabel = y
    surf1: Surface "Surface membrane" | data = dset1; expr = u; wireframe = off
      hght1: Height "Elévation membrane" | expr = u
    surf2: Surface "Surface patch" | data = dset1; expr = u2
      hght1: Height "Elévation patch" | expr = u; isheightaxisshown = on
  pg11: PlotGroup1D "Probe Plot Group 11"
    tblp1: Table "Probe Table Graph 1" | table = tbl5; plotcolumns = 1
    tblp2: Table "Probe Table Graph 2" | table = tbl6; plotcolumns = {1, 2}
    tblp3: Table "Probe Table Graph 3" | table = tbl7; plotcolumns = {1, 2}